tis 28 aug 2018 16:13:10 CEST
$PROBLEM  PHENOBARB SIMPLE MODEL
$INPUT  ID TIME AMT WGT APGR DV
$DATA  pheno.dta IGNORE=@
$SUBROUTINE  ADVAN1 TRANS2
$PK

      TVCL=THETA(1)
      TVV=THETA(2)
      CL=TVCL*EXP(ETA(1))
      V=TVV*EXP(ETA(2))
      S1=V
$ERROR

      W=F
      Y=F+W*EPS(1)

      IPRED=F         ;  individual-specific prediction
      IRES=DV-IPRED   ;  individual-specific residual
      IWRES=IRES/W    ;  individual-specific weighted residual

$THETA  (0,0.0105)    ; CL

$THETA  (0,1.0500)    ; V

$OMEGA            .4  ; IVCL
                  .25 ; IVV

$SIGMA            .04

$ESTIMATION  MAXEVALS=9997 SIGDIGITS=4 POSTHOC MSFO=phenomsf
$COVARIANCE  PRINT=E
$TABLE ID TIME DV NOPRINT ONEHEADER FILE=sdtab1
$TABLE ID TVCL TVV APGR NOPRINT ONEHEADER FILE=patab1

NM-TRAN MESSAGES
 WARNINGS AND ERRORS (IF ANY) FOR PROBLEM    1
 (WARNING  2) NM-TRAN INFERS THAT THE DATA ARE POPULATION.

1NONLINEAR MIXED EFFECTS MODEL PROGRAM (NONMEM) VERSION 7.4.3
 ORIGINALLY DEVELOPED BY STUART BEAL, LEWIS SHEINER, AND ALISON BOECKMANN
 CURRENT DEVELOPERS ARE ROBERT BAUER, ICON DEVELOPMENT SOLUTIONS,
 AND ALISON BOECKMANN. IMPLEMENTATION, EFFICIENCY, AND STANDARDIZATION
 PERFORMED BY NOUS INFOSYSTEMS.
 PROBLEM NO.:         1
 PHENOBARB SIMPLE MODEL
 TOT. NO. OF OBS RECS:      155
 TOT. NO. OF INDIVIDUALS:       59
 ONE COMPARTMENT MODEL (ADVAN1)
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 #TBLN:      1
 #METH: First Order
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
 #TERM:
0MINIMIZATION SUCCESSFUL
 NO. OF FUNCTION EVALUATIONS USED:       89
 NO. OF SIG. DIGITS IN FINAL EST.:  5.4

 TOTAL DATA POINTS NORMALLY DISTRIBUTED (N):          155
 N*LOG(2PI) CONSTANT TO OBJECTIVE FUNCTION:    284.87094529344853
 OBJECTIVE FUNCTION VALUE WITHOUT CONSTANT:    742.05104506946293
 OBJECTIVE FUNCTION VALUE WITH CONSTANT:       1026.9219903629114
 REPORTED OBJECTIVE FUNCTION DOES NOT CONTAIN CONSTANT

 TOTAL EFFECTIVE ETAS (NIND*NETA):                           118


 #TERE:
 Elapsed estimation  time in seconds:     0.04
 Elapsed covariance  time in seconds:     0.02
 Elapsed postprocess time in seconds:     0.01

 ********************                                   FIRST ORDER                                  ********************
 #OBJT:**************                       MINIMUM VALUE OF OBJECTIVE FUNCTION                      ********************
 #OBJV:********************************************      742.051       **************************************************

 ********************                                   FIRST ORDER                                  ********************
 ********************                             FINAL PARAMETER ESTIMATE                           ********************

 THETA - VECTOR OF FIXED EFFECTS PARAMETERS   *********
         TH 1      TH 2
         5.55E-03  1.34E+00

 OMEGA - COV MATRIX FOR RANDOM EFFECTS - ETAS  ********
         ETA1      ETA2
 ETA1
+        2.47E-01
 ETA2
+        0.00E+00  1.42E-01

 SIGMA - COV MATRIX FOR RANDOM EFFECTS - EPSILONS  ****
         EPS1
 EPS1
+        1.64E-02

 OMEGA - CORR MATRIX FOR RANDOM EFFECTS - ETAS  *******
         ETA1      ETA2
 ETA1
+        4.97E-01
 ETA2
+        0.00E+00  3.76E-01

 SIGMA - CORR MATRIX FOR RANDOM EFFECTS - EPSILONS  ***
         EPS1
 EPS1
+        1.28E-01

 ********************                                   FIRST ORDER                                  ********************
 ********************                            STANDARD ERROR OF ESTIMATE                          ********************

 THETA - VECTOR OF FIXED EFFECTS PARAMETERS   *********
         TH 1      TH 2
         3.95E-04  7.99E-02

 OMEGA - COV MATRIX FOR RANDOM EFFECTS - ETAS  ********
         ETA1      ETA2
 ETA1
+        1.56E-01
 ETA2
+       .........  3.49E-02

 SIGMA - COV MATRIX FOR RANDOM EFFECTS - EPSILONS  ****
         EPS1
 EPS1
+        3.39E-03

 OMEGA - CORR MATRIX FOR RANDOM EFFECTS - ETAS  *******
         ETA1      ETA2
 ETA1
+        1.56E-01
 ETA2
+       .........  4.64E-02

 SIGMA - CORR MATRIX FOR RANDOM EFFECTS - EPSILONS  ***
         EPS1
 EPS1
+        1.32E-02

 ********************                                   FIRST ORDER                                  ********************
 ********************                          COVARIANCE MATRIX OF ESTIMATE                         ********************

            TH 1      TH 2      OM11      OM12      OM22      SG11
 TH 1
+        1.56E-07
 TH 2
+        4.58E-06  6.38E-03
 OM11
+       -2.72E-05 -1.93E-03  2.42E-02
 OM12
+       ......... ......... ......... .........
 OM22
+        3.56E-06  1.28E-03 -9.92E-04 .........  1.22E-03
 SG11
+        7.25E-08  2.13E-05  7.08E-05 ......... -5.34E-07  1.15E-05

 ********************                                   FIRST ORDER                                  ********************
 ********************                          CORRELATION MATRIX OF ESTIMATE                        ********************

            TH 1      TH 2      OM11      OM12      OM22      SG11
 TH 1
+        3.95E-04
 TH 2
+        1.45E-01  7.99E-02
 OM11
+       -4.44E-01 -1.55E-01  1.56E-01
 OM12
+       ......... ......... ......... .........
 OM22
+        2.58E-01  4.60E-01 -1.83E-01 .........  3.49E-02
 SG11
+        5.41E-02  7.84E-02  1.34E-01 ......... -4.50E-03  3.39E-03
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
 ********************                                   FIRST ORDER                                  ********************
 ********************                      EIGENVALUES OF COR MATRIX OF ESTIMATE                     ********************

             1         2         3         4         5
         4.69E-01  5.81E-01  9.76E-01  1.15E+00  1.83E+00
 Elapsed finaloutput time in seconds:     0.01
 #CPUT: Total CPU Time in Seconds,        0.089
